//This file contains a moment measures for the following joints in the arm:

//Elbowpronation
//ElbowFlexion
//Glenohumeral

//The measures named:
//  ElbowPronationNetMoment
//  ElbowFlexionNetMoment
//  GHNetMoment
//will measure the moments and forces supplied by the muscles spanning these and on top of these
//moments and force the forces and moments from the constraints in the joints will be added.
//The resulting force and moment are equal to the to total moment and force which
//could replace both the muscles spanning the joint and the joints reactions.

//The measures named:
//  ElbowPronationNetMomentMuscles
//  ElbowFlexionNetMomentMuscles
//  GHNetMomentMuscles
//will measure ONLY the moments and forces supplied by the muscles spanning these joint and not the moments and forces which from the constraints in the joints.
//The resulting force and moment are equal to the to total moment and force which
//are supplied by the muscles.

//In both cases the resulting force and moment is given in the global coordinate system.

//A vector which shows the resulting moment as an arrow, will automatically be shown in the model view the parameters of it can
//be controlled from the "DrawSettings.any" file typically to be found in the application directory.,


AnyForceMomentMeasure2 ElbowPronationNetMoment = {
  AnyRefNode &ref1 =..Seg.Ulna.ps2.RotNode;
  AnySeg &seg1 =..Seg.Radius;
  AnySeg &seg2 =..Seg.Hand;
  AnySeg &seg3 =..Seg.WristJointSeg;

  AnyReacForce &jnt1=..Jnt.WristJointFlexion.Constraints.Reaction;
  AnyReacForce &jnt1Bis=..Jnt.WristJointDeviation.Constraints.Reaction;
  AnyReacForce &jnt2=..Jnt.PSProximalConstraints.Reaction;
  AnyReacForce &jnt3=..Jnt.PSLinDistalConstraint.Reaction;
  #include  "ArmMuscleNames.any"

  //    //Make transformation to the radius.ps2.rotnode coordinate system
  //    AnyRefNode &ref2=.ShoulderArm.Seg.Radius.PointPS2.RotNode;
  //
  //    AnyVec3 Mlocal=M*ref2.Axes;
  //    AnyVar ElbowPronation=Mlocal[0];


//  AnyDrawVector DrawVector=
//  {
//    AnyRefNode &ref1=.ref1;
//    Vec = Main.DrawSettings.NetMomentVector.ScaleFactor*.M;
//    PointAway = On;
//    DrawCoord = Off;
//    Line.RGB =  Main.DrawSettings.NetMomentVector.RGB;
//    Line.Thickness = Main.DrawSettings.NetMomentVector.Thickness;
//    Line.End.Thickness = 2*Main.DrawSettings.NetMomentVector.Thickness;
//    Line.End.Length = 4*Main.DrawSettings.NetMomentVector.Thickness;
//  };
};


AnyForceMomentMeasure2 ElbowFlexionNetMoment = {
  AnyRefNode &ref=..Seg.Humerus.fe.RotNode;

  AnySeg &seg1=..Seg.Ulna;
  AnySeg &seg2=..Seg.Radius;
  AnySeg &seg3=..Seg.Hand;
  AnySeg &seg4 =..Seg.WristJointSeg;

  AnyReacForce &jnt1=..Jnt.WristJointFlexion.Constraints.Reaction;
  AnyReacForce &jnt1Bis=..Jnt.WristJointDeviation.Constraints.Reaction;
  AnyReacForce &jnt2=..Jnt.PSProximalConstraints.Reaction;
  AnyReacForce &jnt3=..Jnt.PSLinDistalConstraint.Reaction;
  AnyReacForce &jnt4=..Jnt.FE.Constraints.Reaction;

  #include  "ArmMuscleNames.any"


  //    Make transformation to the radius.ps2.rotnode coordinate system
  //    AnyRefNode &ref2=.ShoulderArm.Seg.Humerus.fe.RotNode;
  //
  //    AnyVec3 Mlocal=M*ref2.Axes;
  //    AnyVar ElbowFlexion=Mlocal[0];

//  AnyDrawVector DrawVector=
//  {
//    AnyRefNode &ref1=.ref;
//    Vec = Main.DrawSettings.NetMomentVector.ScaleFactor*.M;
//    PointAway = On;
//    DrawCoord = Off;
//    Line.RGB =  Main.DrawSettings.NetMomentVector.RGB;
//    Line.Thickness = Main.DrawSettings.NetMomentVector.Thickness;
//    Line.End.Thickness = 2*Main.DrawSettings.NetMomentVector.Thickness;
//    Line.End.Length = 4*Main.DrawSettings.NetMomentVector.Thickness;
//  };
};


AnyForceMomentMeasure2 GHNetMoment = {
  AnyRefNode &ref=..Seg.Humerus.gh.RotNode;

  AnySeg &seg0=..Seg.Humerus;
  #if BM_ARM_DELTOID_WRAPPING == ON
    AnySeg &seg5a = ..Mus.DeltoidWrappingPosterior.WrappingSegment;
    AnySeg &seg5b = ..Mus.DeltoidWrappingLateral.WrappingSegment;
    AnySeg &seg5c = ..Mus.DeltoidWrappingAnterior.WrappingSegment;
  #else
    AnySeg &seg6=..Mus.ArtificialRake.DeltoidMuscleRotControlSeg;
  #endif
  AnySeg &seg1=..Seg.Ulna;
  AnySeg &seg2=..Seg.Radius;
  AnySeg &seg3=..Seg.Hand;
  AnySeg &seg4 =..Seg.WristJointSeg;

  AnyReacForce &jnt1=..Jnt.WristJointFlexion.Constraints.Reaction;
  AnyReacForce &jnt1Bis=..Jnt.WristJointDeviation.Constraints.Reaction;
  AnyReacForce &jnt2=..Jnt.PSProximalConstraints.Reaction;
  AnyReacForce &jnt3=..Jnt.PSLinDistalConstraint.Reaction;
  AnyReacForce &jnt4=..Jnt.FE.Constraints.Reaction;


  //the gh reactions are supplied by muscles so these muscles has to be listed here.
  AnyFolder &conmus1 = ..Jnt.GHReactions.EdgeMuscle1;
  AnyFolder &conmus2 = ..Jnt.GHReactions.EdgeMuscle2;
  AnyFolder &conmus3 = ..Jnt.GHReactions.EdgeMuscle3;
  AnyFolder &conmus4 = ..Jnt.GHReactions.EdgeMuscle4;
  AnyFolder &conmus5 = ..Jnt.GHReactions.EdgeMuscle5;
  AnyFolder &conmus6 = ..Jnt.GHReactions.EdgeMuscle6;
  AnyFolder &conmus7 = ..Jnt.GHReactions.EdgeMuscle7;
  AnyFolder &conmus8 = ..Jnt.GHReactions.EdgeMuscle8;


  #include  "ArmMuscleNames.any"


  //    //Make transformation to the Humerus.gh.RotNode coordinate system
  //    AnyRefNode &ref2=..Seg.Humerus.gh.RotNode;
  //
  //    AnyVec3 Mlocal=M*ref2.Axes;
  //    AnyVar ElbowFlexion=Mlocal[0];


//  AnyDrawVector DrawVector=
//  {
//    AnyRefNode &ref1=.ref;
//    Vec = Main.DrawSettings.NetMomentVector.ScaleFactor*.M;
//    PointAway = On;
//    DrawCoord = Off;
//    Line.RGB =  Main.DrawSettings.NetMomentVector.RGB;
//    Line.Thickness = Main.DrawSettings.NetMomentVector.Thickness;
//    Line.End.Thickness = 2*Main.DrawSettings.NetMomentVector.Thickness;
//    Line.End.Length = 4*Main.DrawSettings.NetMomentVector.Thickness;
//  };
};


//The same measures as above without the joint reactions
//******************************************************


AnyForceMomentMeasure2 WristFlexionNetMomentMuscles = {
  AnyRefNode &ref =..Seg.Radius.wj.RotNode;
  AnySeg &seg1 =..Seg.WristJointSeg;
  AnySeg &seg2 =..Seg.Hand;

  #include  "ArmMuscleNames.any"


      //Make transformation to the Radius.wj.rotnode coordinate system
      AnyVec3 Mlocal=M*ref.Axes;
      AnyVar WristFlexion=Mlocal[1];


//  AnyDrawVector DrawVector=
//  {
//    AnyRefNode &ref1=.ref1;
//    Vec = Main.DrawSettings.NetMomentMuscleVector.ScaleFactor*.M;
//    PointAway = On;
//    DrawCoord = Off;
//    Line.RGB =  Main.DrawSettings.NetMomentMuscleVector.RGB;
//    Line.Thickness = Main.DrawSettings.NetMomentMuscleVector.Thickness;
//    Line.End.Thickness = 2*Main.DrawSettings.NetMomentMuscleVector.Thickness;
//    Line.End.Length = 4*Main.DrawSettings.NetMomentMuscleVector.Thickness;
//  };
};


AnyForceMomentMeasure2 WristAbductionNetMomentMuscles = {
  AnyRefNode &ref =..Seg.WristJointSeg.RadialUlnarDeviation.RotNode;
  AnySeg &seg2 =..Seg.Hand;

  #include  "ArmMuscleNames.any"


      //Make transformation to the WristJointSeg.RadialUlnarDeviation.rotnode coordinate system
      AnyVec3 Mlocal=M*ref.Axes;
      AnyVar WristAbduction=Mlocal[2];


//  AnyDrawVector DrawVector=
//  {
//    AnyRefNode &ref1=.ref1;
//    Vec = Main.DrawSettings.NetMomentMuscleVector.ScaleFactor*.M;
//    PointAway = On;
//    DrawCoord = Off;
//    Line.RGB =  Main.DrawSettings.NetMomentMuscleVector.RGB;
//    Line.Thickness = Main.DrawSettings.NetMomentMuscleVector.Thickness;
//    Line.End.Thickness = 2*Main.DrawSettings.NetMomentMuscleVector.Thickness;
//    Line.End.Length = 4*Main.DrawSettings.NetMomentMuscleVector.Thickness;
//  };
};


AnyForceMomentMeasure2 ElbowPronationNetMomentMuscles = {
  AnyRefNode &ref =..Seg.Ulna.ps2.RotNode;
  AnySeg &seg1 =..Seg.Radius;
  AnySeg &seg2 =..Seg.WristJointSeg;
  AnySeg &seg3 =..Seg.Hand;

  #include  "ArmMuscleNames.any"


      //Make transformation to the radius.ps2.rotnode coordinate system
      AnyVec3 Mlocal=M*ref.Axes;
      AnyVar ElbowPronation=Mlocal[0];


//  AnyDrawVector DrawVector=
//  {
//    AnyRefNode &ref1=.ref1;
//    Vec = Main.DrawSettings.NetMomentMuscleVector.ScaleFactor*.M;
//    PointAway = On;
//    DrawCoord = Off;
//    Line.RGB =  Main.DrawSettings.NetMomentMuscleVector.RGB;
//    Line.Thickness = Main.DrawSettings.NetMomentMuscleVector.Thickness;
//    Line.End.Thickness = 2*Main.DrawSettings.NetMomentMuscleVector.Thickness;
//    Line.End.Length = 4*Main.DrawSettings.NetMomentMuscleVector.Thickness;
//  };
};


AnyForceMomentMeasure2 ElbowFlexionNetMomentMuscles = {
  AnyRefNode &ref=..Seg.Humerus.fe.RotNode;

  AnySeg &seg1=..Seg.Ulna;
  AnySeg &seg2=..Seg.Radius;
  AnySeg &seg3=..Seg.Hand;
  AnySeg &seg4 =..Seg.WristJointSeg;
  #include  "ArmMuscleNames.any"


      //Make transformation to the Humerus.fe.rotnode coordinate system
      AnyVec3 Mlocal=M*ref.Axes;
      AnyVar ElbowFlexion=Mlocal[0];

//  AnyDrawVector DrawVector=
//  {
//    AnyRefNode &ref1=.ref;
//    Vec = Main.DrawSettings.NetMomentMuscleVector.ScaleFactor*.M;
//    PointAway = On;
//    DrawCoord = Off;
//    Line.RGB =  Main.DrawSettings.NetMomentMuscleVector.RGB;
//    Line.Thickness = Main.DrawSettings.NetMomentMuscleVector.Thickness;
//    Line.End.Thickness = 2*Main.DrawSettings.NetMomentMuscleVector.Thickness;
//    Line.End.Length = 4*Main.DrawSettings.NetMomentMuscleVector.Thickness;
//  };
};


AnyForceMomentMeasure2 GHNetMomentMuscles = {
  AnyRefNode &ref=..Seg.Scapula.gh.RotNode;

  AnySeg &seg0=..Seg.Humerus;
  #if BM_ARM_DELTOID_WRAPPING == ON
    AnySeg &seg5a = ..Mus.DeltoidWrappingPosterior.WrappingSegment;
    AnySeg &seg5b = ..Mus.DeltoidWrappingLateral.WrappingSegment;
    AnySeg &seg5c = ..Mus.DeltoidWrappingAnterior.WrappingSegment;
  #else
    AnySeg &seg5=..Mus.ArtificialRake.DeltoidMuscleRotControlSeg;
  #endif
  AnySeg &seg1=..Seg.Ulna;
  AnySeg &seg2=..Seg.Radius;
  AnySeg &seg3=..Seg.Hand;
  AnySeg &seg6 =..Seg.WristJointSeg;


  #include  "ArmMuscleNames.any"


      //Make transformation to the Scapula.gh.RotNode coordinate system
      AnyVec3 Mlocal=M*ref.Axes;
      AnyVar GHAbduction=Mlocal[0];
      AnyVar GHFlexion=Mlocal[2];
      AnyVar GHExternalRotation=Mlocal[1];

//  AnyDrawVector DrawVector=
//  {
//    AnyRefNode &ref1=.ref;
//    Vec = Main.DrawSettings.NetMomentMuscleVector.ScaleFactor*.M;
//    PointAway = On;
//    DrawCoord = Off;
//    Line.RGB =  Main.DrawSettings.NetMomentMuscleVector.RGB;
//    Line.Thickness = Main.DrawSettings.NetMomentMuscleVector.Thickness;
//    Line.End.Thickness = 2*Main.DrawSettings.NetMomentMuscleVector.Thickness;
//    Line.End.Length = 4*Main.DrawSettings.NetMomentMuscleVector.Thickness;
//  };
};


AnyForceMomentMeasure ElbowJointReactionMoments =
{
  AnyForceBase &Force = ..Jnt.FE.Constraints.Reaction;
  AnyRefFrame &Humerusfe = ..Seg.Humerus.fe;
  AnyVec3 Mlocal = M*Humerusfe.Axes;
};

AnyForceMomentMeasure WristJointReactionMoments =
{
  AnyForceBase &Force = ..Jnt.WristJointFlexion.Constraints.Reaction;
  AnyRefFrame &Radiuswj = ..Seg.Radius.wj;
  AnyVec3 Mlocal = M*Radiuswj.Axes;
};
