///The muscles of the cervical spine on the right side.
AnyFolder MusclesCervicalSpineRight = {

  AnyViaPointMuscle LumpedHyoidT1C0 = {
    AnyMuscleModel &MusMdl = ..MuscleParametersCervicalSpineRight.LumpedHyoidT1C0Par;
    AnyRefNode &Org = ..SegmentsThorax.SkullSeg.LumpedHyoidT1C0NodeR;
    AnyRefNode &Ins = ..SegmentsThorax.ThoraxSeg.LumpedHyoidT1C0NodeR;
    AnyDrawMuscle DrwMus = {#include "../drawSettings/MusDrawSettings.any"};
  };

  AnyViaPointMuscle LongusColliT1C6 = {
    AnyMuscleModel &MusMdl = ..MuscleParametersCervicalSpineRight.LongusColliT1C6Par;
    AnyRefNode &Org = ..SegmentsThorax.ThoraxSeg.LongusColliT1NodeR;
    AnyRefNode &Ins = ..SegmentsCervicalSpine.C6Seg.LongusColliT1C6NodeR;
    AnyDrawMuscle DrwMus = {#include "../drawSettings/MusDrawSettings.any"};
  };

  AnyViaPointMuscle LongusColliT1C5 = {
    AnyMuscleModel &MusMdl = ..MuscleParametersCervicalSpineRight.LongusColliT1C5Par;
    AnyRefNode &Org = ..SegmentsThorax.ThoraxSeg.LongusColliT1NodeR;
    AnyRefNode &Via1 = ..SegmentsCervicalSpine.C6Seg.LongusColliT1C6NodeR;
    AnyRefNode &Ins = ..SegmentsCervicalSpine.C5Seg.LongusColliT1C5NodeR;
    AnyDrawMuscle DrwMus = {#include "../drawSettings/MusDrawSettings.any"};
  };

  AnyViaPointMuscle LongusColliT1C4 = {
    AnyMuscleModel &MusMdl = ..MuscleParametersCervicalSpineRight.LongusColliT1C4Par;
    AnyRefNode &Org = ..SegmentsThorax.ThoraxSeg.LongusColliT1NodeR;
    AnyRefNode &Via1 = ..SegmentsCervicalSpine.C6Seg.LongusColliT1C6NodeR;
    AnyRefNode &Via2 = ..SegmentsCervicalSpine.C5Seg.LongusColliT1C5NodeR;
    AnyRefNode &Ins = ..SegmentsCervicalSpine.C4Seg.LongusColliT1C4NodeR;
    AnyDrawMuscle DrwMus = {#include "../drawSettings/MusDrawSettings.any"};
  };

  AnyViaPointMuscle LongusColliT1C3 = {
    AnyMuscleModel &MusMdl = ..MuscleParametersCervicalSpineRight.LongusColliT1C3Par;
    AnyRefNode &Org = ..SegmentsThorax.ThoraxSeg.LongusColliT1NodeR;
    AnyRefNode &Via1 = ..SegmentsCervicalSpine.C6Seg.LongusColliT1C6NodeR;
    AnyRefNode &Via2 = ..SegmentsCervicalSpine.C5Seg.LongusColliT1C5NodeR;
    AnyRefNode &Via3 = ..SegmentsCervicalSpine.C4Seg.LongusColliT1C4NodeR;
    AnyRefNode &Ins = ..SegmentsCervicalSpine.C3Seg.LongusColliT1C3NodeR;
    AnyDrawMuscle DrwMus = {#include "../drawSettings/MusDrawSettings.any"};
  };

  AnyViaPointMuscle LongusColliT1C2 = {
    AnyMuscleModel &MusMdl = ..MuscleParametersCervicalSpineRight.LongusColliT1C2Par;
    AnyRefNode &Org = ..SegmentsThorax.ThoraxSeg.LongusColliT1NodeR;
    AnyRefNode &Via1 = ..SegmentsCervicalSpine.C6Seg.LongusColliT1C6NodeR;
    AnyRefNode &Via2 = ..SegmentsCervicalSpine.C5Seg.LongusColliT1C5NodeR;
    AnyRefNode &Via3 = ..SegmentsCervicalSpine.C4Seg.LongusColliT1C4NodeR;
    AnyRefNode &Via4 = ..SegmentsCervicalSpine.C3Seg.LongusColliT1C3NodeR;
    AnyRefNode &Ins = ..SegmentsCervicalSpine.C2Seg.LongusColliT1C2NodeR;
    AnyDrawMuscle DrwMus = {#include "../drawSettings/MusDrawSettings.any"};
  };

  AnyViaPointMuscle LongusColliT1C1 = {
    AnyMuscleModel &MusMdl = ..MuscleParametersCervicalSpineRight.LongusColliT1C1Par;
    AnyRefNode &Org = ..SegmentsThorax.ThoraxSeg.LongusColliT1NodeR;
    AnyRefNode &Via1 = ..SegmentsCervicalSpine.C6Seg.LongusColliT1C6NodeR;
    AnyRefNode &Via2 = ..SegmentsCervicalSpine.C5Seg.LongusColliT1C5NodeR;
    AnyRefNode &Via3 = ..SegmentsCervicalSpine.C4Seg.LongusColliT1C4NodeR;
    AnyRefNode &Via4 = ..SegmentsCervicalSpine.C3Seg.LongusColliT1C3NodeR;
    AnyRefNode &Via5 = ..SegmentsCervicalSpine.C2Seg.LongusColliT1C2NodeR;
    AnyRefNode &Ins = ..SegmentsCervicalSpine.C1Seg.LongusColliT1C1NodeR;
    AnyDrawMuscle DrwMus = {#include "../drawSettings/MusDrawSettings.any"};
  };

  AnyViaPointMuscle LongusColliT1C0 = {
    AnyMuscleModel &MusMdl = ..MuscleParametersCervicalSpineRight.LongusColliT1C0Par;
    AnyRefNode &Org = ..SegmentsThorax.ThoraxSeg.LongusColliT1NodeR;
    AnyRefNode &Via1 = ..SegmentsCervicalSpine.C6Seg.LongusColliT1C6NodeR;
    AnyRefNode &Via2 = ..SegmentsCervicalSpine.C5Seg.LongusColliT1C5NodeR;
    AnyRefNode &Via3 = ..SegmentsCervicalSpine.C4Seg.LongusColliT1C4NodeR;
    AnyRefNode &Via4 = ..SegmentsCervicalSpine.C3Seg.LongusColliT1C3NodeR;
    AnyRefNode &Via5 = ..SegmentsCervicalSpine.C2Seg.LongusColliT1C2NodeR;
    AnyRefNode &Via6 = ..SegmentsCervicalSpine.C1Seg.LongusColliT1C1NodeR;
    AnyRefNode &Ins = ..SegmentsThorax.SkullSeg.LongusColliT1C0NodeR;
    AnyDrawMuscle DrwMus = {#include "../drawSettings/MusDrawSettings.any"};
  };

  AnyViaPointMuscle LongusCapitisC6C0 = {
    AnyMuscleModel &MusMdl = ..MuscleParametersCervicalSpineRight.LongusCapitisC6C0Par;
    AnyRefNode &Org = ..SegmentsCervicalSpine.C6Seg.LongusCapitisC6C0NodeR;
    AnyRefNode &Ins = ..SegmentsThorax.SkullSeg.LongusCapitisC0NodeR;
    AnyDrawMuscle DrwMus = {#include "../drawSettings/MusDrawSettings.any"};
  };

  AnyViaPointMuscle LongusCapitisC5C0 = {
    AnyMuscleModel &MusMdl = ..MuscleParametersCervicalSpineRight.LongusCapitisC5C0Par;
    AnyRefNode &Org = ..SegmentsCervicalSpine.C5Seg.LongusCapitisC5C0NodeR;
    AnyRefNode &Ins = ..SegmentsThorax.SkullSeg.LongusCapitisC0NodeR;
    AnyDrawMuscle DrwMus = {#include "../drawSettings/MusDrawSettings.any"};
  };

  AnyViaPointMuscle LongusCapitisC4C0 = {
    AnyMuscleModel &MusMdl = ..MuscleParametersCervicalSpineRight.LongusCapitisC4C0Par;
    AnyRefNode &Org = ..SegmentsCervicalSpine.C4Seg.LongusCapitisC4C0NodeR;
    AnyRefNode &Ins = ..SegmentsThorax.SkullSeg.LongusCapitisC0NodeR;
    AnyDrawMuscle DrwMus = {#include "../drawSettings/MusDrawSettings.any"};
  };

  AnyViaPointMuscle LongusCapitisC3C0 = {
    AnyMuscleModel &MusMdl = ..MuscleParametersCervicalSpineRight.LongusCapitisC3C0Par;
    AnyRefNode &Org = ..SegmentsCervicalSpine.C3Seg.LongusCapitisC3C0NodeR;
    AnyRefNode &Ins = ..SegmentsThorax.SkullSeg.LongusCapitisC0NodeR;
    AnyDrawMuscle DrwMus = {#include "../drawSettings/MusDrawSettings.any"};
  };

  AnyViaPointMuscle ScalenusAnteriorT1C4 = {
    AnyMuscleModel &MusMdl = ..MuscleParametersCervicalSpineRight.ScalenusAnteriorT1C4Par;
    AnyRefNode &Org = ..SegmentsCervicalSpine.C4Seg.ScalenusAnteriorT1C4NodeR;
    AnyRefNode &Ins = ..SegmentsThorax.ThoraxSeg.ScalenusAnteriorT1C4NodeR;
    AnyDrawMuscle DrwMus = {#include "../drawSettings/MusDrawSettings.any"};
  };

  AnyViaPointMuscle ScalenusMediusT1C3 = {
    AnyMuscleModel &MusMdl = ..MuscleParametersCervicalSpineRight.ScalenusMediusT1C3Par;
    AnyRefNode &Org = ..SegmentsCervicalSpine.C3Seg.ScalenusMediusT1C3NodeR;
    AnyRefNode &Ins = ..SegmentsThorax.ThoraxSeg.ScalenusMediusT1C3NodeR;
    AnyDrawMuscle DrwMus = {#include "../drawSettings/MusDrawSettings.any"};
  };

  AnyViaPointMuscle ScalenusPosteriorT1C5 = {
    AnyMuscleModel &MusMdl = ..MuscleParametersCervicalSpineRight.ScalenusPosteriorT1C5Par;
    AnyRefNode &Org = ..SegmentsCervicalSpine.C5Seg.ScalenusPosteriorT1C5NodeR;
    AnyRefNode &Ins = ..SegmentsThorax.ThoraxSeg.ScalenusPosteriorT1C5NodeR;
    AnyDrawMuscle DrwMus = {#include "../drawSettings/MusDrawSettings.any"};
  };
  /*
  AnyViaPointMuscle SternocleidomastoidSternumCO = {
  AnyMuscleModel &MusMdl = ..MuscleParametersCervicalSpineRight.SternocleidomastoidSternumC0Par;
  AnyRefNode &Org = ..SegmentsThorax.SkullSeg.SternocleidomastoidSternumC0NodeR;
  AnyRefNode &Ins = ..SegmentsThorax.ThoraxSeg.SternocleidomastoidSternumC0NodeR;
    AnyDrawMuscle DrwMus = {#include "../drawSettings/MusDrawSettings.any"};
  };

  //  AnyForce ForceSternocleidomastoidSternumCO =
  //  {
  //    F = {0.6*-53.1};
  //    AnyKinMeasure& ref = .SternocleidomastoidSternumCO.Line;
  //  };


  AnyViaPointMuscle SternocleidomastoidClavicleCO = {
  AnyMuscleModel &MusMdl = ..MuscleParametersCervicalSpineRight.SternocleidomastoidClavicleC0Par;
  AnyRefNode &Org = ..SegmentsThorax.SkullSeg.SternocleidomastoidClavicleC0NodeR;
  AnyRefNode &Ins = ..SegmentsThorax.ThoraxSeg.SternocleidomastoidClavicleC0NodeR;
  AnyDrawMuscle DrwMus = {#include "../drawSettings/MusDrawSettings.any"};
  };

  //  AnyForce ForceSternocleidomastoidClavicleCO =
  //  {
  //    F = {0.6*-72.9};
  //    AnyKinMeasure& ref = .SternocleidomastoidClavicleCO.Line;
  //  };
  */

  //Moved to shoulder model
//  AnyViaPointMuscle Sternocleidomastoid = {
//    AnyMuscleModel &MusMdl = ..MuscleParametersCervicalSpineRight.SternocleidomastoidSternumC0Par;
//    AnyRefNode &Ins = ..SegmentsThorax.ThoraxSeg.SternocleidomastoidSternumC0NodeR;
//    AnyRefNode &Via = ..SegmentsThorax.SkullSeg.SternocleidomastoidSternumC0NodeR;
//    AnyRefNode &Ins2 = ..SegmentsThorax.ThoraxSeg.SternocleidomastoidClavicleC0NodeR;
//    AnyDrawMuscle DrwMus = {#include "../drawSettings/MusDrawSettings.any"};
//  };

//  AnyForce ForceSternocleidomastoid =
//  {
//    AnyFunInterpol force ={
//      Type=Bspline;
//      BsplineOrder = 4;
//      FileName = "../../../Application/Aalborg/Simulation experimental muscle pain/SternoR_Ft_Output2.txt";
//    };
//    F = force(t);
//
//    AnyKinMeasure& ref = .Sternocleidomastoid.Line;
//  };

  AnyViaPointMuscle SpleniusCapitisC7C0 = {
    AnyMuscleModel &MusMdl = ..MuscleParametersCervicalSpineRight.SpleniusCapitisC7C0Par;
    AnyRefNode &Org = ..SegmentsThorax.SkullSeg.SpleniusCapitisNodeR;
    AnyRefNode &Ins = ..SegmentsCervicalSpine.C7Seg.SpleniusCapitisC7C0NodeR;
    AnyDrawMuscle DrwMus = {#include "../drawSettings/MusDrawSettings.any"};
  };

  AnyViaPointMuscle SpleniusCapitisT2C0 = {
    AnyMuscleModel &MusMdl = ..MuscleParametersCervicalSpineRight.SpleniusCapitisT2C0Par;
    AnyRefNode &Org = ..SegmentsThorax.SkullSeg.SpleniusCapitisNodeR;
    AnyRefNode &Ins = ..SegmentsThorax.ThoraxSeg.SpleniusCapitisT2C0NodeR;
    AnyDrawMuscle DrwMus = {#include "../drawSettings/MusDrawSettings.any"};
  };

  AnyViaPointMuscle SpleniusCervicisT3C1 = {
    AnyMuscleModel &MusMdl = ..MuscleParametersCervicalSpineRight.SpleniusCervicisT3C1Par;
    AnyRefNode &Org = ..SegmentsThorax.ThoraxSeg.SpleniusCervicisNodeR;
    AnyRefNode &Ins = ..SegmentsCervicalSpine.C1Seg.SpleniusCervicisT3C1NodeR;
    AnyDrawMuscle DrwMus = {#include "../drawSettings/MusDrawSettings.any"};
  };

  AnyViaPointMuscle SpleniusCervicisT3C2 = {
    AnyMuscleModel &MusMdl = ..MuscleParametersCervicalSpineRight.SpleniusCervicisT3C2Par;
    AnyRefNode &Org = ..SegmentsThorax.ThoraxSeg.SpleniusCervicisNodeR;
    AnyRefNode &Ins = ..SegmentsCervicalSpine.C2Seg.SpleniusCervicisT3C2NodeR;
    AnyDrawMuscle DrwMus = {#include "../drawSettings/MusDrawSettings.any"};
  };

  AnyViaPointMuscle SpleniusCervicisT3C3 = {
    AnyMuscleModel &MusMdl = ..MuscleParametersCervicalSpineRight.SpleniusCervicisT3C3Par;
    AnyRefNode &Org = ..SegmentsThorax.ThoraxSeg.SpleniusCervicisNodeR;
    AnyRefNode &Ins = ..SegmentsCervicalSpine.C3Seg.SpleniusCervicisT3C3NodeR;
    AnyDrawMuscle DrwMus = {#include "../drawSettings/MusDrawSettings.any"};
  };

  AnyViaPointMuscle SemispinalisCapitisC4C0 = {
    AnyMuscleModel &MusMdl = ..MuscleParametersCervicalSpineRight.SemispinalisCapitisC4C0Par;
    AnyRefNode &Org = ..SegmentsCervicalSpine.C4Seg.SemispinalisCapitisC4C0NodeR;
    AnyRefNode &Ins = ..SegmentsThorax.SkullSeg.SemispinalisCapitisNodeR;
    AnyDrawMuscle DrwMus = {#include "../drawSettings/MusDrawSettings.any"};
  };

  AnyViaPointMuscle SemispinalisCapitisC5C0 = {
    AnyMuscleModel &MusMdl = ..MuscleParametersCervicalSpineRight.SemispinalisCapitisC5C0Par;
    AnyRefNode &Org = ..SegmentsCervicalSpine.C5Seg.SemispinalisCapitisC5C0NodeR;
    AnyRefNode &Ins = ..SegmentsThorax.SkullSeg.SemispinalisCapitisNodeR;
    AnyDrawMuscle DrwMus = {#include "../drawSettings/MusDrawSettings.any"};
  };

  AnyViaPointMuscle SemispinalisCapitisC6C0 = {
    AnyMuscleModel &MusMdl = ..MuscleParametersCervicalSpineRight.SemispinalisCapitisC6C0Par;
    AnyRefNode &Org = ..SegmentsCervicalSpine.C6Seg.SemispinalisCapitisC6C0NodeR;
    AnyRefNode &Ins = ..SegmentsThorax.SkullSeg.SemispinalisCapitisNodeR;
    AnyDrawMuscle DrwMus = {#include "../drawSettings/MusDrawSettings.any"};
  };

  AnyViaPointMuscle SemispinalisCapitisC7C0 = {
    AnyMuscleModel &MusMdl = ..MuscleParametersCervicalSpineRight.SemispinalisCapitisC7C0Par;
    AnyRefNode &Org = ..SegmentsCervicalSpine.C7Seg.SemispinalisCapitisC7C0NodeR;
    AnyRefNode &Ins = ..SegmentsThorax.SkullSeg.SemispinalisCapitisNodeR;
    AnyDrawMuscle DrwMus = {#include "../drawSettings/MusDrawSettings.any"};
  };

  AnyViaPointMuscle SemispinalisCapitisT3C0 = {
    AnyMuscleModel &MusMdl = ..MuscleParametersCervicalSpineRight.SemispinalisCapitisT3C0Par;
    AnyRefNode &Org = ..SegmentsThorax.ThoraxSeg.SemispinalisCapitisT3C0NodeR;
    AnyRefNode &Ins = ..SegmentsThorax.SkullSeg.SemispinalisCapitisNodeR;
    AnyDrawMuscle DrwMus = {#include "../drawSettings/MusDrawSettings.any"};
  };

  AnyViaPointMuscle SemispinalisCervicisT1C2 = {
    AnyMuscleModel &MusMdl = ..MuscleParametersCervicalSpineRight.SemispinalisCervicisT1C2Par;
    AnyRefNode &Org = ..SegmentsThorax.ThoraxSeg.SemispinalisCervicisT1C2NodeR;
    AnyRefNode &Ins = ..SegmentsCervicalSpine.C2Seg.SemispinalisCervicisT1C2NodeR;
    AnyDrawMuscle DrwMus = {#include "../drawSettings/MusDrawSettings.any"};
  };

  AnyViaPointMuscle SemispinalisCervicisT2C3 = {
    AnyMuscleModel &MusMdl = ..MuscleParametersCervicalSpineRight.SemispinalisCervicisT2C3Par;
    AnyRefNode &Org = ..SegmentsThorax.ThoraxSeg.SemispinalisCervicisT2C3NodeR;
    AnyRefNode &Ins = ..SegmentsCervicalSpine.C3Seg.SemispinalisCervicisT2C3NodeR;
    AnyDrawMuscle DrwMus = {#include "../drawSettings/MusDrawSettings.any"};
  };

  AnyViaPointMuscle SemispinalisCervicisT3C4 = {
    AnyMuscleModel &MusMdl = ..MuscleParametersCervicalSpineRight.SemispinalisCervicisT3C4Par;
    AnyRefNode &Org = ..SegmentsThorax.ThoraxSeg.SemispinalisCervicisT3C4NodeR;
    AnyRefNode &Ins = ..SegmentsCervicalSpine.C4Seg.SemispinalisCervicisT3C4NodeR;
    AnyDrawMuscle DrwMus = {#include "../drawSettings/MusDrawSettings.any"};
  };

  AnyViaPointMuscle SemispinalisCervicisT4C5 = {
    AnyMuscleModel &MusMdl = ..MuscleParametersCervicalSpineRight.SemispinalisCervicisT4C5Par;
    AnyRefNode &Org = ..SegmentsThorax.ThoraxSeg.SemispinalisCervicisT4C5NodeR;
    AnyRefNode &Ins = ..SegmentsCervicalSpine.C5Seg.SemispinalisCervicisT4C5NodeR;
    AnyDrawMuscle DrwMus = {#include "../drawSettings/MusDrawSettings.any"};
  };

  AnyViaPointMuscle SemispinalisCervicisT5C6 = {
    AnyMuscleModel &MusMdl = ..MuscleParametersCervicalSpineRight.SemispinalisCervicisT5C6Par;
    AnyRefNode &Org = ..SegmentsThorax.ThoraxSeg.SemispinalisCervicisT5C6NodeR;
    AnyRefNode &Ins = ..SegmentsCervicalSpine.C6Seg.SemispinalisCervicisT5C6NodeR;
    AnyDrawMuscle DrwMus = {#include "../drawSettings/MusDrawSettings.any"};
  };

  AnyViaPointMuscle SemispinalisCervicisT6C7 = {
    AnyMuscleModel &MusMdl = ..MuscleParametersCervicalSpineRight.SemispinalisCervicisT6C7Par;
    AnyRefNode &Org = ..SegmentsThorax.ThoraxSeg.SemispinalisCervicisT6C7NodeR;
    AnyRefNode &Ins = ..SegmentsCervicalSpine.C7Seg.SemispinalisCervicisT6C7NodeR;
    AnyDrawMuscle DrwMus = {#include "../drawSettings/MusDrawSettings.any"};
  };

  AnyViaPointMuscle LongissimusCapitisC3C0 = {
    AnyMuscleModel &MusMdl = ..MuscleParametersCervicalSpineRight.LongissimusCapitisC3C0Par;
    AnyRefNode &Org = ..SegmentsCervicalSpine.C3Seg.LongissimusCapitisC3C0NodeR;
    AnyRefNode &Ins = ..SegmentsThorax.SkullSeg.LongissimusCapitisNodeR;
    AnyDrawMuscle DrwMus = {#include "../drawSettings/MusDrawSettings.any"};
  };

  AnyViaPointMuscle LongissimusCapitisC4C0 = {
    AnyMuscleModel &MusMdl = ..MuscleParametersCervicalSpineRight.LongissimusCapitisC4C0Par;
    AnyRefNode &Org = ..SegmentsCervicalSpine.C4Seg.LongissimusCapitisC4C0NodeR;
    AnyRefNode &Ins = ..SegmentsThorax.SkullSeg.LongissimusCapitisNodeR;
    AnyDrawMuscle DrwMus = {#include "../drawSettings/MusDrawSettings.any"};
  };

  AnyViaPointMuscle LongissimusCapitisC5C0 = {
    AnyMuscleModel &MusMdl = ..MuscleParametersCervicalSpineRight.LongissimusCapitisC5C0Par;
    AnyRefNode &Org = ..SegmentsCervicalSpine.C5Seg.LongissimusCapitisC5C0NodeR;
    AnyRefNode &Ins = ..SegmentsThorax.SkullSeg.LongissimusCapitisNodeR;
    AnyDrawMuscle DrwMus = {#include "../drawSettings/MusDrawSettings.any"};
  };

  AnyViaPointMuscle LongissimusCapitisC6C0 = {
    AnyMuscleModel &MusMdl = ..MuscleParametersCervicalSpineRight.LongissimusCapitisC6C0Par;
    AnyRefNode &Org = ..SegmentsCervicalSpine.C6Seg.LongissimusCapitisC6C0NodeR;
    AnyRefNode &Ins = ..SegmentsThorax.SkullSeg.LongissimusCapitisNodeR;
    AnyDrawMuscle DrwMus = {#include "../drawSettings/MusDrawSettings.any"};
  };

  AnyViaPointMuscle LongissimusCapitisC7C0 = {
    AnyMuscleModel &MusMdl = ..MuscleParametersCervicalSpineRight.LongissimusCapitisC7C0Par;
    AnyRefNode &Org = ..SegmentsCervicalSpine.C7Seg.LongissimusCapitisC7C0NodeR;
    AnyRefNode &Ins = ..SegmentsThorax.SkullSeg.LongissimusCapitisNodeR;
    AnyDrawMuscle DrwMus = {#include "../drawSettings/MusDrawSettings.any"};
  };

  AnyViaPointMuscle LongissimusCapitisT2C0 = {
    AnyMuscleModel &MusMdl = ..MuscleParametersCervicalSpineRight.LongissimusCapitisT2C0Par;
    AnyRefNode &Org = ..SegmentsThorax.ThoraxSeg.LongissimusCapitisT2C0NodeR;
    AnyRefNode &Ins = ..SegmentsThorax.SkullSeg.LongissimusCapitisNodeR;
    AnyDrawMuscle DrwMus = {#include "../drawSettings/MusDrawSettings.any"};
  };

  AnyViaPointMuscle LongissimusCervicisT2C2 = {
    AnyMuscleModel &MusMdl = ..MuscleParametersCervicalSpineRight.LongissimusCervicisT2C2Par;
    AnyRefNode &Org = ..SegmentsThorax.ThoraxSeg.LongissimusCervicisT2NodeR;
    AnyRefNode &Ins = ..SegmentsCervicalSpine.C2Seg.LongissimusCervicisT2C2NodeR;
    AnyDrawMuscle DrwMus = {#include "../drawSettings/MusDrawSettings.any"};
  };

  AnyViaPointMuscle LongissimusCervicisT2C3 = {
    AnyMuscleModel &MusMdl = ..MuscleParametersCervicalSpineRight.LongissimusCervicisT2C3Par;
    AnyRefNode &Org = ..SegmentsThorax.ThoraxSeg.LongissimusCervicisT2NodeR;
    AnyRefNode &Ins = ..SegmentsCervicalSpine.C3Seg.LongissimusCervicisT2C3NodeR;
    AnyDrawMuscle DrwMus = {#include "../drawSettings/MusDrawSettings.any"};
  };

  AnyViaPointMuscle LongissimusCervicisT2C4 = {
    AnyMuscleModel &MusMdl = ..MuscleParametersCervicalSpineRight.LongissimusCervicisT2C4Par;
    AnyRefNode &Org = ..SegmentsThorax.ThoraxSeg.LongissimusCervicisT2NodeR;
    AnyRefNode &Ins = ..SegmentsCervicalSpine.C4Seg.LongissimusCervicisT2C4NodeR;
    AnyDrawMuscle DrwMus = {#include "../drawSettings/MusDrawSettings.any"};
  };

  AnyViaPointMuscle LongissimusCervicisT2C5 = {
    AnyMuscleModel &MusMdl = ..MuscleParametersCervicalSpineRight.LongissimusCervicisT2C5Par;
    AnyRefNode &Org = ..SegmentsThorax.ThoraxSeg.LongissimusCervicisT2NodeR;
    AnyRefNode &Ins = ..SegmentsCervicalSpine.C5Seg.LongissimusCervicisT2C5NodeR;
    AnyDrawMuscle DrwMus = {#include "../drawSettings/MusDrawSettings.any"};
  };

  AnyViaPointMuscle LongissimusCervicisT2C6 = {
    AnyMuscleModel &MusMdl = ..MuscleParametersCervicalSpineRight.LongissimusCervicisT2C6Par;
    AnyRefNode &Org = ..SegmentsThorax.ThoraxSeg.LongissimusCervicisT2NodeR;
    AnyRefNode &Ins = ..SegmentsCervicalSpine.C6Seg.LongissimusCervicisT2C6NodeR;
    AnyDrawMuscle DrwMus = {#include "../drawSettings/MusDrawSettings.any"};
  };

  AnyViaPointMuscle LongissimusCervicisT2C7 = {
    AnyMuscleModel &MusMdl = ..MuscleParametersCervicalSpineRight.LongissimusCervicisT2C7Par;
    AnyRefNode &Org = ..SegmentsThorax.ThoraxSeg.LongissimusCervicisT2NodeR;
    AnyRefNode &Ins = ..SegmentsCervicalSpine.C7Seg.LongissimusCervicisT2C7NodeR;
    AnyDrawMuscle DrwMus = {#include "../drawSettings/MusDrawSettings.any"};
  };

  AnyViaPointMuscle MultifidusCervicisC5C2 = {
    AnyMuscleModel &MusMdl = ..MuscleParametersCervicalSpineRight.MultifidusCervicisC5C2Par;
    AnyRefNode &Org = ..SegmentsCervicalSpine.C5Seg.MultifidusCervicisC5C2NodeR;
    AnyRefNode &Ins = ..SegmentsCervicalSpine.C2Seg.MultifidusCervicisC2NodeR;
    AnyDrawMuscle DrwMus = {#include "../drawSettings/MusDrawSettings.any"};
  };

  AnyViaPointMuscle MultifidusCervicisC6C2 = {
    AnyMuscleModel &MusMdl = ..MuscleParametersCervicalSpineRight.MultifidusCervicisC6C2Par;
    AnyRefNode &Org = ..SegmentsCervicalSpine.C6Seg.MultifidusCervicisC6C2NodeR;
    AnyRefNode &Ins = ..SegmentsCervicalSpine.C2Seg.MultifidusCervicisC2NodeR;
    AnyDrawMuscle DrwMus = {#include "../drawSettings/MusDrawSettings.any"};
  };

  AnyViaPointMuscle MultifidusCervicisC6C3 = {
    AnyMuscleModel &MusMdl = ..MuscleParametersCervicalSpineRight.MultifidusCervicisC6C3Par;
    AnyRefNode &Org = ..SegmentsCervicalSpine.C6Seg.MultifidusCervicisC6C2NodeR;
    AnyRefNode &Ins = ..SegmentsCervicalSpine.C3Seg.MultifidusCervicisC3NodeR;
    AnyDrawMuscle DrwMus = {#include "../drawSettings/MusDrawSettings.any"};
  };

  AnyViaPointMuscle MultifidusCervicisC7C3 = {
    AnyMuscleModel &MusMdl = ..MuscleParametersCervicalSpineRight.MultifidusCervicisC7C3Par;
    AnyRefNode &Org = ..SegmentsCervicalSpine.C7Seg.MultifidusCervicisC7C3NodeR;
    AnyRefNode &Ins = ..SegmentsCervicalSpine.C3Seg.MultifidusCervicisC3NodeR;
    AnyDrawMuscle DrwMus = {#include "../drawSettings/MusDrawSettings.any"};
  };

  AnyViaPointMuscle MultifidusCervicisC7C4 = {
    AnyMuscleModel &MusMdl = ..MuscleParametersCervicalSpineRight.MultifidusCervicisC7C4Par;
    AnyRefNode &Org = ..SegmentsCervicalSpine.C7Seg.MultifidusCervicisC7C4NodeR;
    AnyRefNode &Ins = ..SegmentsCervicalSpine.C4Seg.MultifidusCervicisC4NodeR;
    AnyDrawMuscle DrwMus = {#include "../drawSettings/MusDrawSettings.any"};
  };

  AnyViaPointMuscle MultifidusCervicisT1C4 = {
    AnyMuscleModel &MusMdl = ..MuscleParametersCervicalSpineRight.MultifidusCervicisT1C4Par;
    AnyRefNode &Org = ..SegmentsThorax.ThoraxSeg.MultifidusCervicisT1C4NodeR;
    AnyRefNode &Ins = ..SegmentsCervicalSpine.C4Seg.MultifidusCervicisC4NodeR;
    AnyDrawMuscle DrwMus = {#include "../drawSettings/MusDrawSettings.any"};
  };

  AnyViaPointMuscle MultifidusCervicisT1C5 = {
    AnyMuscleModel &MusMdl = ..MuscleParametersCervicalSpineRight.MultifidusCervicisT1C5Par;
    AnyRefNode &Org = ..SegmentsThorax.ThoraxSeg.MultifidusCervicisT1C5NodeR;
    AnyRefNode &Ins = ..SegmentsCervicalSpine.C5Seg.MultifidusCervicisC5NodeR;
    AnyDrawMuscle DrwMus = {#include "../drawSettings/MusDrawSettings.any"};
  };

  AnyViaPointMuscle MultifidusCervicisT2C5 = {
    AnyMuscleModel &MusMdl = ..MuscleParametersCervicalSpineRight.MultifidusCervicisT2C5Par;
    AnyRefNode &Org = ..SegmentsThorax.ThoraxSeg.MultifidusCervicisT2C5NodeR;
    AnyRefNode &Ins = ..SegmentsCervicalSpine.C5Seg.MultifidusCervicisC5NodeR;
    AnyDrawMuscle DrwMus = {#include "../drawSettings/MusDrawSettings.any"};
  };

  AnyViaPointMuscle MultifidusCervicisT2C6 = {
    AnyMuscleModel &MusMdl = ..MuscleParametersCervicalSpineRight.MultifidusCervicisT2C6Par;
    AnyRefNode &Org = ..SegmentsThorax.ThoraxSeg.MultifidusCervicisT2C6NodeR;
    AnyRefNode &Ins = ..SegmentsCervicalSpine.C6Seg.MultifidusCervicisC6NodeR;
    AnyDrawMuscle DrwMus = {#include "../drawSettings/MusDrawSettings.any"};
  };

  AnyViaPointMuscle MultifidusCervicisT3C6 = {
    AnyMuscleModel &MusMdl = ..MuscleParametersCervicalSpineRight.MultifidusCervicisT3C6Par;
    AnyRefNode &Org = ..SegmentsThorax.ThoraxSeg.MultifidusCervicisT3C6NodeR;
    AnyRefNode &Ins = ..SegmentsCervicalSpine.C6Seg.MultifidusCervicisC6NodeR;
    AnyDrawMuscle DrwMus = {#include "../drawSettings/MusDrawSettings.any"};
  };

  AnyViaPointMuscle MultifidusCervicisT3C7 = {
    AnyMuscleModel &MusMdl = ..MuscleParametersCervicalSpineRight.MultifidusCervicisT3C7Par;
    AnyRefNode &Org = ..SegmentsThorax.ThoraxSeg.MultifidusCervicisT3C7NodeR;
    AnyRefNode &Ins = ..SegmentsCervicalSpine.C7Seg.MultifidusCervicisC7NodeR;
    AnyDrawMuscle DrwMus = {#include "../drawSettings/MusDrawSettings.any"};
  };

  AnyViaPointMuscle MultifidusCervicisT4C7 = {
    AnyMuscleModel &MusMdl = ..MuscleParametersCervicalSpineRight.MultifidusCervicisT4C7Par;
    AnyRefNode &Org = ..SegmentsThorax.ThoraxSeg.MultifidusCervicisT4C7NodeR;
    AnyRefNode &Ins = ..SegmentsCervicalSpine.C7Seg.MultifidusCervicisC7NodeR;
    AnyDrawMuscle DrwMus = {#include "../drawSettings/MusDrawSettings.any"};
  };

}; //End of MusclesCervicalSpineRight
