#path __BM_PLUGIN_FILE__ "BodyModelConfig.any"
#define BM_CONFIG_PLUGIN __BM_PLUGIN_FILE__

// ----------------------------------------------------------
// Model configuration:
// For more info on body model configuration options please load the model and double click on:
// #include "<ANYBODY_PATH_AMMR>\Documentation\bm_config\index.html"
// ----------------------------------------------------------
Main = {

  //#define INCLUDE_UPPERBODY ON
  #define BM_TRUNK_CERVICAL_MUSCLES _MUSCLES_SIMPLE_
  #define BM_SCALING _SCALING_LENGTHMASSFAT_
  #define BM_MANNEQUIN_DRIVER_DEFAULT OFF

  #define BM_TRUNK_MUSCLES ON
  #ifndef BM_LEG_MODEL
  #define BM_LEG_MODEL _LEG_MODEL_TLEM2_
  #endif
  #define BM_ARM_RIGHT ON
  #define BM_ARM_LEFT ON
  #define BM_ARM_MUSCLES_RIGHT _MUSCLES_3E_HILL_
  #define BM_ARM_MUSCLES_LEFT _MUSCLES_3E_HILL_


};
#define BM_LEG_MUSCLES_RIGHT _MUSCLES_3E_HILL_
#define BM_LEG_MUSCLES_LEFT _MUSCLES_3E_HILL_
#define BM_ARM_SHOULDER_RHYTHM ON
#define BM_TRUNK_CERVICAL_DISC_STIFNESS _DISC_STIFFNESS_NONLINEAR_
#define BM_TRUNK_LUMBAR_DISC_STIFNESS _DISC_STIFFNESS_NONLINEAR_
#define BM_TRUNK_CERVICAL_LIGAMENTS ON
#define BM_TRUNK_LUMBAR_LIGAMENTS ON
#define BM_GLOBAL_REFERENCE_FRAME_SWITCH OFF
#define BM_MANNEQUIN_DRIVER_WEAK_SWITCH OFF
